# Определение функций пользователя
f1(x, y) := y
f2(x, y) := -1/25*y - 8/15*x^3
f(x, y) := [f1(x, y); f2(x, y)]
# Поиск стационарных точек
z := f(x, y) solve, [x; y] → [0, 0]
# Находим Якобиан
J(x, y) := [d/dx(f1(x, y)), d/dy(f1(x, y)); d/dx(f2(x, y)), d/dy(f2(x, y))]
J(x, y) → [0, 1; -8*x^2/5, -1/25]
A := J(0, 0)
λ := eigenvals(A)
λ = [0; -0.04]
# Построение фазовых портретов
XY[1] := z[0, 0]
XY[2] := z[0, 1]
z := [-2; 2]
z1 := [2; 2]
z2 := [2; -2]
z4 := [0.3; 0.3]
z3 := [-2; -2]
dz(t, z) := f(z[0], z[1])
N := 1000
n := 0 .. N
Z := rkfixed(z, 0, 5, N, dz)
Z1 := rkfixed(z1, 0, 5, N, dz)
Z2 := rkfixed(z2, 0, 50, N, dz)
Z3 := rkfixed(z3, 0, 5, N, dz)
Z4 := rkfixed(z4, 0, 20, N, dz)
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